# Heizkörper

Dataset: ILCD process, EPD, generic dataset
Geography: DE
Reference year: 2008
Valid until: 2013
Classification: GaBiCategories: Bauindustrie / Gebäudetechnik / Heizung / Wärmeverteilung und Wärmeabgabe
Classification: oekobau.dat: Gebäudetechnik / Heizung / Wärmeverteilung und Abgabe
Owner: PE INTERNATIONAL
Compliance: DIN EN 15804
Review: Dependent internal review by PE INTERNATIONAL
Amounts: rows without a unit in brackets have none in this file; such an amount is in the reference unit of its flow, which a separate flow dataset defines
copyright: true

## General comment
Dieser Datensatz beinhaltet die Ergebnisse für die Module A1 – A3 gemäß EN 15804.

## Time period
jährlicher Durchschnitt

## Technology and included processes
Die Ökobilanzergebnisse umfassen die Lebenszyklusstadien der Herstellung der Vorprodukte bis hin zur Rohstoffgewinnung und Verarbeitungsprozesse von als Input dienenden Sekundärstoffen (z.B. Recyclingprozesse), deren Transporte zum Werk sowie die Produktion selbst, einschließlich der Bereitstellung von allen Hilfs- und Betriebsstoffen, Energie, sowie die vollständige Abfallbehandlung oder die Deponierung der Restabfälle während des Stadiums der Produktion. Die Module A1, A2 und A3 sind hier als ein aggregiertes Modul A1-A3 ausgewiesen. Falls für diesen Datensatz weitere Module berechnet wurden, sind diese separat zu finden und können für eine Betrachtung des gesamten Lebenszyklus zusammengeführt werden.

Lackierter Flachheizkörper aus Stahl. Für Flachheizkörper kann nach VDI Richtline 2067 von einer 30 jährigen durchschnittlichen Lebensdauer ausgegangen werden.

## Technical purpose
Abgabe vom Thermischer Energie an die Raumluft

## Safety margin
20 %. wenige Teile (Prozesse) fehlen

## Reference product
- Heizkörper: 1

## Inputs
- Erneuerbare Primärenergie als Energieträger (PERE) [MJ]: A1-A3 1.20327
- Erneuerbare Primärenergie zur stofflichen Nutzung (PERM) [MJ]: A1-A3 0
- Total erneuerbare Primärenergie (PERT) [MJ]: A1-A3 1.20327
- Nicht-erneuerbare Primärenergie als Energieträger (PENRE) [MJ]: A1-A3 64.4552
- Nicht-erneuerbare Primärenergie zur stofflichen Nutzung (PENRM) [MJ]: A1-A3 0
- Total nicht erneuerbare Primärenergie (PENRT) [MJ]: A1-A3 64.4552
- Einsatz von Sekundärstoffen (SM) [kg]: A1-A3 0.159442
- Erneuerbare Sekundärbrennstoffe (RSF) [MJ]: A1-A3 -0.032437
- Nicht erneuerbare Sekundärbrennstoffe (NRSF) [MJ]: A1-A3 -0.341599
- Einsatz von Süßwasserressourcen (FW) [m3]: A1-A3 0.667262

## Outputs
- Gefährlicher Abfall zur Deponie (HWD) [kg]: A1-A3 1.54568e-6
- Entsorgter nicht gefährlicher Abfall (NHWD) [kg]: A1-A3 16.8474
- Entsorgter radioaktiver Abfall (RWD) [kg]: A1-A3 0.00020959
- Komponenten für die Wiederverwendung (CRU) [kg]: A1-A3 0
- Stoffe zum Recycling (MFR) [kg]: A1-A3 0
- Stoffe für die Energierückgewinnung (MER) [kg]: A1-A3 0
- Exportierte elektrische Energie (EEE) [MJ]: A1-A3 0
- Exportierte thermische Energie (EET) [MJ]: A1-A3 0

## Impact indicators
- Globales Erwärmungspotenzial (GWP) [kg CO2-Äqv.]: A1-A3 4.36368
- Abbau Potential der stratosphärischen Ozonschicht (ODP) [kg CFC 11-Äquiv.]: A1-A3 -3.21502e-9
- Versauerungspotenzial von Boden und Wasser (AP) [kg SO2-Äqv.]: A1-A3 0.0132002
- Eutrophierungspotenzial (EP) [kg Phosphat-Äqv.]: A1-A3 0.00115128
- Bildungspotential für troposphärisches Ozon (POCP) [kg Ethen-Äqv.]: A1-A3 0.0024351
- Potenzial für den abiotischen Abbau nicht fossiler Ressourcen (ADPE) [kg Sb-Äqv.]: A1-A3 8.94182e-7
- Potenzial für den abiotischen Abbau fossiler Brennstoffe (ADPF) [MJ]: A1-A3 60.5197

## Use advice
Dieser Datensatz beinhaltet die Ergebnisse für die Module A1 – A3 gemäß EN 15804.
Der Datensatz hat eine funktionelle Einheit von einem Kilogramm Flachheizkörper aus lackiertem Stahl und kann mit Hilfe der Gewichtsangaben für Heizkörper unterschiedlichem Typs skaliert werden. Der vorliegende Datensatz ist mit einem Sicherheitszuschlag von 20% auf die Ergebnisse versehen.

## Data sources
- VDI 2067
- GaBi4 Software und Datenbank 2006
- BUDERUS 2002
