# Kalk (CaO; Feinkalk)

Dataset: ILCD process, EPD, generic dataset
Geography: DE
Reference year: 2000
Valid until: 2013
Classification: GaBiCategories: Produktion / Werkstoffherstellung / Herstellung mineralischer Stoffe
Classification: oekobau.dat: Mineralische Baustoffe / Bindemittel / Kalk
Owner: PE INTERNATIONAL
Compliance: DIN EN 15804
Review: Dependent internal review by PE INTERNATIONAL
Amounts: rows without a unit in brackets have none in this file; such an amount is in the reference unit of its flow, which a separate flow dataset defines
copyright: true

## General comment
Dieser Datensatz beinhaltet die Ergebnisse für die Module A1 – A3 gemäß EN 15804.

## Time period
Jährlicher Durchschnitt

## Technology and included processes
Die Ökobilanzergebnisse umfassen die Lebenszyklusstadien der Herstellung der Vorprodukte bis hin zur Rohstoffgewinnung und Verarbeitungsprozesse von als Input dienenden Sekundärstoffen (z.B. Recyclingprozesse), deren Transporte zum Werk sowie die Produktion selbst, einschließlich der Bereitstellung von allen Hilfs- und Betriebsstoffen, Energie, sowie die vollständige Abfallbehandlung oder die Deponierung der Restabfälle während des Stadiums der Produktion. Die Module A1, A2 und A3 sind hier als ein aggregiertes Modul A1-A3 ausgewiesen. Falls für diesen Datensatz weitere Module berechnet wurden, sind diese separat zu finden und können für eine Betrachtung des gesamten Lebenszyklus zusammengeführt werden.

Die Lebenszyklusanalyse von Feinkalk umfasst den Prozess der Kalkstein-Gewinnung, das Brennen und Mahlen. In Mühlen wird Branntkalk zu Feinkalk aufgemahlen. Häufig kommen hierbei Mahlhilfen zum Einsatz wie Alkohole oder Amine (<0,2%). Zum Teil werden Sortiermaschinen eingesetzt, um eine verbesserte Qualität und Regularität zu erhalten. Die Systemgrenze bildet das versandfertige Produkt Feinkalk am Werkstor. Transporte vom Werk zur Baustelle sind nicht berücksichtigt und müssen bei Systembetrachtungen eingerechnet werden.

## Technical purpose
Mineralisches Bindemittel

## Reference product
- Kalk Feinkalk (gemahlen): 1

## Inputs
- Erneuerbare Primärenergie als Energieträger (PERE) [MJ]: A1-A3 0.0648763
- Erneuerbare Primärenergie zur stofflichen Nutzung (PERM) [MJ]: A1-A3 0
- Total erneuerbare Primärenergie (PERT) [MJ]: A1-A3 0.0648763
- Nicht-erneuerbare Primärenergie als Energieträger (PENRE) [MJ]: A1-A3 6.44631
- Nicht-erneuerbare Primärenergie zur stofflichen Nutzung (PENRM) [MJ]: A1-A3 0
- Total nicht erneuerbare Primärenergie (PENRT) [MJ]: A1-A3 6.44631
- Einsatz von Sekundärstoffen (SM) [kg]: A1-A3 0
- Erneuerbare Sekundärbrennstoffe (RSF) [MJ]: A1-A3 4.30484e-5
- Nicht erneuerbare Sekundärbrennstoffe (NRSF) [MJ]: A1-A3 0.000450304
- Einsatz von Süßwasserressourcen (FW) [m3]: A1-A3 0.0562159

## Outputs
- Gefährlicher Abfall zur Deponie (HWD) [kg]: A1-A3 0
- Entsorgter nicht gefährlicher Abfall (NHWD) [kg]: A1-A3 1.79073
- Entsorgter radioaktiver Abfall (RWD) [kg]: A1-A3 3.60069e-5
- Komponenten für die Wiederverwendung (CRU) [kg]: A1-A3 0
- Stoffe zum Recycling (MFR) [kg]: A1-A3 0
- Stoffe für die Energierückgewinnung (MER) [kg]: A1-A3 0
- Exportierte elektrische Energie (EEE) [MJ]: A1-A3 0
- Exportierte thermische Energie (EET) [MJ]: A1-A3 0

## Impact indicators
- Globales Erwärmungspotenzial (GWP) [kg CO2-Äqv.]: A1-A3 1.4589
- Abbau Potential der stratosphärischen Ozonschicht (ODP) [kg CFC 11-Äquiv.]: A1-A3 1.25424e-10
- Versauerungspotenzial von Boden und Wasser (AP) [kg SO2-Äqv.]: A1-A3 0.000415424
- Eutrophierungspotenzial (EP) [kg Phosphat-Äqv.]: A1-A3 6.80221e-5
- Bildungspotential für troposphärisches Ozon (POCP) [kg Ethen-Äqv.]: A1-A3 3.41139e-5
- Potenzial für den abiotischen Abbau nicht fossiler Ressourcen (ADPE) [kg Sb-Äqv.]: A1-A3 1.55732e-8
- Potenzial für den abiotischen Abbau fossiler Brennstoffe (ADPF) [MJ]: A1-A3 6.35746

## Use advice
Dieser Datensatz beinhaltet die Ergebnisse für die Module A1 – A3 gemäß EN 15804.
Der vorliegende Datensatz ist mit einem Sicherheitszuschlag von 20% auf die Ergebnisse versehen.
Das Umweltprofil beinhaltet die Aufwendungen für die Lebenszyklus-Stadien "Cradle to Gate". Es basiert hauptsächlich auf Literaturrecherchen und direkten Datenerhebungen der Industrie.

## Data sources
- GaBi4 Software und Datenbank 2006
